Wed Jan  5 07:25:02 UTC 2022
$PROBLEM TWO COMPARTMENT ORAL

$DATA pk_oral2_30_90.csv IGNORE=#

$INPUT ID TIME AMT DV MDV

$SUBROUTINE ADVAN4 TRANS4

$PK
  CL    = THETA(1)*EXP(ETA(1)) ;CL/F
  V2    = THETA(2)*EXP(ETA(2)) ;V2/F
  Q     = THETA(3)*EXP(ETA(3)) ;Q/F
  V3    = THETA(4)*EXP(ETA(4)) ;V3/F
  KA    = THETA(5)*EXP(ETA(5)) ;Absorption rate constant
  ALAG1 = THETA(6)*EXP(ETA(6)) ;Lag time
; S2    = V2/1000  ;Scaling factor
; S3    = V3/1000  ;Scaling factor

$ERROR
  IPRED   = F
  W       = SQRT(THETA(7)**2 + THETA(8)**2 * F**2); SIGMA 1 FIX (additive plus proportional error model)
  IRES    = DV - IPRED
  IWRES   = IRES / W
  Y       = IPRED + W * EPS(1)

$THETA
  (0,100);POPCL/F
  (0,700);POPV/F
  (0,70) ;POPQ/F
  (0,500);POPV3/F
  (0,10) ;POPKA
  (0,1)  ;POPALAG1
  0.0001
  0.2

$OMEGA
  .25 ;BSVCL/F
  .25 ;BSVV/F
  .25 ;BSVQ/F
  .25 ;BSVV3/F
  0 FIX ;BSVKA
  0 FIX ;BSVALAG1

$SIGMA
  1 FIX ;ERRCV

;$ESTIMATION METHOD=1 POSTHOC MAXEVAL=9999 PRINT=5
$ESTIMATION NOABORT MAXEVAL=9999 METHOD=1 INTER PRINT=10 SIGDIGITS=3

$COVARIANCE PRINT=E

$TABLE ID TIME IPRED IWRES DV NOPRINT ONEHEADER FILE=sdtab4403
$TABLE ID CL V2 Q V3 KA ALAG1 NOPRINT ONEHEADER NOAPPEND FILE=patab4403

NM-TRAN MESSAGES
 WARNINGS AND ERRORS (IF ANY) FOR PROBLEM    1
 (WARNING  2) NM-TRAN INFERS THAT THE DATA ARE POPULATION.
 (WARNING  23) $PK DOES NOT DEFINE A SCALE PARAMETER FOR THE CENTRAL
 COMPARTMENT.  WITH THIS TRANS, IT MAY NOT BE POSSIBLE TO SEPARATELY
 OBTAIN ESTIMATES OF PARAMETERS AFFECTING CLEARANCE AND VOLUME.

1NONLINEAR MIXED EFFECTS MODEL PROGRAM (NONMEM) VERSION 7.5.0
 ORIGINALLY DEVELOPED BY STUART BEAL, LEWIS SHEINER, AND ALISON BOECKMANN
 CURRENT DEVELOPERS ARE ROBERT BAUER, ICON DEVELOPMENT SOLUTIONS,
 AND ALISON BOECKMANN. IMPLEMENTATION, EFFICIENCY, AND STANDARDIZATION
 PERFORMED BY NOUS INFOSYSTEMS.
 PROBLEM NO.:         1
 TWO COMPARTMENT ORAL
 TOT. NO. OF OBS RECS:       49
 TOT. NO. OF INDIVIDUALS:        6
 TWO COMPARTMENT MODEL WITH FIRST-ORDER ABSORPTION (ADVAN4)
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 #TBLN:      1
 #METH: First Order Conditional Estimation with Interaction
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
 #TERM:
0MINIMIZATION TERMINATED
 DUE TO PROXIMITY OF LAST ITERATION EST. TO A VALUE
 AT WHICH THE OBJ. FUNC. IS INFINITE (ERROR=136)
0AT THE LAST COMPUTED INFINITE VALUE OF THE OBJ. FUNCT.:

0PRED EXIT CODE = 1
0INDIVIDUAL NO.       4   ID= 4.00000000000000E+00   (WITHIN-INDIVIDUAL) DATA REC NO.   3
 THETA=
  1.00E+02   7.00E+02   7.00E+01   5.00E+02   1.00E+01   8.61E-01   7.19E-04   2.00E-01
 ETA=
  1.19E-04  -1.98E-04   5.22E+01   7.92E-05   0.00E+00   0.00E+00
 A ROOT OF THE CHARACTERISTIC EQUATION IS ZERO BECAUSE
 K*K32 IS MUCH SMALLER THAN  (K+K23+K32)**2.
 PERHAPS K OR K32 IS VERY SMALL, OR K23 IS VERY LARGE.

 NO. OF FUNCTION EVALUATIONS USED:      234
 NO. OF SIG. DIGITS UNREPORTABLE
0PARAMETER ESTIMATE IS NEAR ITS BOUNDARY

 ETABAR IS THE ARITHMETIC MEAN OF THE ETA-ESTIMATES,
 AND THE P-VALUE IS GIVEN FOR THE NULL HYPOTHESIS THAT THE TRUE MEAN IS 0.

 ETABAR:         5.0096E-04 -6.2520E-04  4.8495E+00  1.2424E-04  0.0000E+00  0.0000E+00
 SE:             4.3602E-04  5.3543E-04  2.8221E+00  9.9660E-05  0.0000E+00  0.0000E+00
 N:                       6           6           6           6           6           6

 P VAL.:         2.5058E-01  2.4294E-01  8.5725E-02  2.1252E-01  1.0000E+00  1.0000E+00

 ETASHRINKSD(%)  7.6601E+01  7.1266E+01  1.0000E+02  9.4652E+01  0.0000E+00  0.0000E+00
 ETASHRINKVR(%)  9.4525E+01  9.1743E+01  1.0000E+02  9.9714E+01  0.0000E+00  0.0000E+00
 EBVSHRINKSD(%)  9.5694E+01  9.5053E+01  0.0000E+00  9.8787E+01  0.0000E+00  0.0000E+00
 EBVSHRINKVR(%)  9.9815E+01  9.9755E+01  0.0000E+00  9.9985E+01  0.0000E+00  0.0000E+00
 RELATIVEINF(%)  1.0000E-10  1.0000E-10  0.0000E+00  1.0000E-10  0.0000E+00  0.0000E+00
 EPSSHRINKSD(%)  1.0000E-10
 EPSSHRINKVR(%)  1.0000E-10


 TOTAL DATA POINTS NORMALLY DISTRIBUTED (N):           49
 N*LOG(2PI) CONSTANT TO OBJECTIVE FUNCTION:    90.055976254057924
 OBJECTIVE FUNCTION VALUE WITHOUT CONSTANT:    33527183710193476.
 OBJECTIVE FUNCTION VALUE WITH CONSTANT:       33527183710193568.
 REPORTED OBJECTIVE FUNCTION DOES NOT CONTAIN CONSTANT

 TOTAL EFFECTIVE ETAS (NIND*NETA):                            24


 #TERE:
 Elapsed estimation  time in seconds:     0.19
 Elapsed postprocess time in seconds:     0.02

 ********************               FIRST ORDER CONDITIONAL ESTIMATION WITH INTERACTION              ********************
 #OBJT:**************                       MINIMUM VALUE OF OBJECTIVE FUNCTION                      ********************
 #OBJV:*********************************************************       **************************************************

 ********************               FIRST ORDER CONDITIONAL ESTIMATION WITH INTERACTION              ********************
 ********************                             FINAL PARAMETER ESTIMATE                           ********************

 THETA - VECTOR OF FIXED EFFECTS PARAMETERS   *********
         TH 1      TH 2      TH 3      TH 4      TH 5      TH 6      TH 7      TH 8
         1.00E+02  7.00E+02  7.00E+01  5.00E+02  1.00E+01  8.61E-01  7.19E-04  2.00E-01

 OMEGA - COV MATRIX FOR RANDOM EFFECTS - ETAS  ********
         ETA1      ETA2      ETA3      ETA4      ETA5      ETA6
 ETA1
+        2.50E-05
 ETA2
+        0.00E+00  2.50E-05
 ETA3
+        0.00E+00  0.00E+00  1.0E+154
 ETA4
+        0.00E+00  0.00E+00  0.00E+00  2.50E-05
 ETA5
+        0.00E+00  0.00E+00  0.00E+00  0.00E+00  0.00E+00
 ETA6
+        0.00E+00  0.00E+00  0.00E+00  0.00E+00  0.00E+00  0.00E+00

 SIGMA - COV MATRIX FOR RANDOM EFFECTS - EPSILONS  ****
         EPS1
 EPS1
+        1.00E+00

 OMEGA - CORR MATRIX FOR RANDOM EFFECTS - ETAS  *******
         ETA1      ETA2      ETA3      ETA4      ETA5      ETA6
 ETA1
+        5.00E-03
 ETA2
+        0.00E+00  5.00E-03
 ETA3
+        0.00E+00  0.00E+00  1.02E+77
 ETA4
+        0.00E+00  0.00E+00  0.00E+00  5.00E-03
 ETA5
+        0.00E+00  0.00E+00  0.00E+00  0.00E+00  0.00E+00
 ETA6
+        0.00E+00  0.00E+00  0.00E+00  0.00E+00  0.00E+00  0.00E+00

 SIGMA - CORR MATRIX FOR RANDOM EFFECTS - EPSILONS  ***
         EPS1
 EPS1
+        1.00E+00
 Elapsed finaloutput time in seconds:     0.00
 #CPUT: Total CPU Time in Seconds,        0.226
